<?xml version="1.0"?>
<?xml-stylesheet type="text/xsl" href="http://jsbsim.sourceforge.net/JSBSim.xsl"?>

<fdm_config name="PZL-Koliber-160" version="2.0" release="ALPHA"
   xmlns:xsi="http://www.w3.org/2001/XMLSchema-instance"
   xsi:noNamespaceSchemaLocation="http://jsbsim.sourceforge.net/JSBSim.xsd">

 <fileheader>
  <author> AeromatiC++ version 3.3.20 </author>
  <filecreationdate> 16 Sep 2022 </filecreationdate>
  <version>$Revision: 1.80 $</version>
  <description> Models a PZL-Koliber-160. </description>
 </fileheader>

<!--
  File:     PZL-Koliber-160.xml
  Inputs:
    name:          PZL-Koliber-160
    type:          No engine Glider, Small Commuter
    stall speed:   80.00 km/h
    max weight:    950.00 kg
    Fuselage:
     length:        7.37 m
     diameter:      0.84 m
     finess ratio:  8.79
    wing:
     span:         9.47 m
     area:         12.68 m2
     mean chord:   1.31 m
     aspect ratio: 7.00:1
     taper ratio:  1.00:1
     incidence:    7.00 degrees
     dihedral:     7.50 degrees
     sweep:        0.00 degrees
     t/c:          6.58 %

    no. engines:   0
    engine type:   Piston Engine
    engine layout: forward fuselage

    gear type:     tricycle
    steering type: steering
    retractable?:  no

  Outputs:
    wing loading:       734.85 N/m2
     - thickness ratio: 6.58%
    payload:            383.00 kg
    CL-alpha:           5.31 per radian
    CL-0:               0.61
    CL-max:             2.43
    CD-0:               0.01
    K:                  0.02
    Mcrit:              0.70

    min. turn radius    27.80 m
    max. turn rate:     0.88 deg/s
-->

 <metrics>
   <wingarea  unit="M2">    12.68 </wingarea>
   <wingspan  unit="M" >     9.47 </wingspan>
   <wing_incidence unit="DEG"> 7.00 </wing_incidence>
   <chord     unit="M" >     1.31 </chord>
   <htailarea unit="M2">     3.48 </htailarea>
   <htailarm  unit="M" >     3.80 </htailarm>
   <vtailarea  unit="M2">    1.80 </vtailarea>
   <vtailarm  unit="M" >     3.80 </vtailarm>
   <location name="AERORP" unit="M">
     <x>    0.137371  </x>
     <y>     0.00 </y>
     <z>     0.1736 </z>
   </location>
   <location name="EYEPOINT" unit="M">
     <x>     0.96 </x>
     <y> 0.0  </y>
     <z>     1.14 </z>
   </location>
   <location name="VRP" unit="M">
     <x>     0.0 </x>
     <y>     0.0 </y>
     <z>     0.0 </z>
   </location>
 </metrics>

 <mass_balance>
   <ixx unit="KG*M2">   1468.61 </ixx>
   <iyy unit="KG*M2">    837.93 </iyy>
   <izz unit="KG*M2">   2218.54 </izz>
   <emptywt unit="KG" >    567.00 </emptywt>
   <location name="CG" unit="M">
     <x>  -0.189152  </x>
     <y>     0.00 </y>
     <z>    0.1975 </z>
   </location>
 <pointmass name="Pilot">
    <weight unit="KG">0</weight>
    <location name="POINTMASS" unit="M">
     <x>    -0.068725  </x>
     <y>  -0.220115</y>
     <z>  0.418834</z>
   </location>
   </pointmass>
    <pointmass name="Co-pilot">
    <weight unit="KG"> 0 </weight>
    <location name="POINTMASS" unit="M">
     <x>  -0.068725 </x>
     <y>    0.220115</y>
     <z>0.418834</z>
   </location>
  </pointmass>
   <pointmass name="Left passanger">
    <weight unit="KG"> 0</weight>
    <location name="POINTMASS" unit="M">
     <x>    0.797793 </x>
     <y>  -0.220115 </y>
     <z> 0.418834</z>
   </location>
  </pointmass>
    <pointmass name="Right passanger">
    <weight unit="KG"> 0 </weight>
    <location name="POINTMASS" unit="M">
     <x>  0.797793  </x>
     <y>   0.220115 </y>
     <z> 0.418834</z>
   </location>
  </pointmass>
 </mass_balance>

 <propulsion>

 <engine file="Lycoming_O-320">
    <feed>2</feed>

    <thruster file="sensenich_propeller">
     <sense> 1 </sense>
     <location unit="M">
       <x> 0.225294</x>
       <y>     0.00 </y>
       <z>   0.0503</z>
     </location>
     <orient unit="DEG">
       <pitch>     0.00 </pitch>
        <roll>     0.00 </roll>
         <yaw>     0.00 </yaw>
     </orient>
    </thruster>
  </engine>

  <tank type="FUEL" number="0">
     <location unit="M">
       <x>-0.003296 </x>
       <y> -1.37903 </y>
       <z>  0.059237  </z>
     </location>
     <capacity unit="KG"> 63.9 </capacity>
     <contents unit="KG"> 31.45 </contents>
  </tank>
  <tank type="FUEL" number="1">
     <location unit="M">
       <x> -0.003296</x>
       <y>  1.37903 </y>
       <z>  0.059237  </z>
     </location>
     <capacity unit="KG"> 63.9 </capacity>
     <contents unit="KG"> 31.45 </contents>
  </tank>
  <tank type="FUEL" number="2"> <!-- carb tank -->
     <location unit="M">
       <x> 0.125294</x>
       <y>     0.00 </y>
       <z>   0.0503</z>
     </location>
     <capacity unit="KG">0.1</capacity>
     <contents unit="KG">0</contents>
  </tank>

  <system file="fuel.xml"/>

 </propulsion>

 <ground_reactions>
  <contact type="BOGEY" name="NOSE">
    <location unit="M">
      <x>     -1.51674 </x>
      <y>   0.074282 </y>
      <z>   -0.798493  </z>
    </location>
    <static_friction>  0.80 </static_friction>
    <dynamic_friction> 0.50 </dynamic_friction>
    <rolling_friction> 0.02 </rolling_friction>
	<spring_coeff unit="LBS/FT">1850</spring_coeff>
	<damping_coeff unit="LBS/FT/SEC">1100</damping_coeff>
	<damping_coeff_rebound unit="LBS/FT/SEC">10</damping_coeff_rebound>
    <max_steer unit="DEG"> 5.00 </max_steer>
    <brake_group> NONE </brake_group>
    <retractable> 0 </retractable>
  </contact>

  <contact type="BOGEY" name="LEFT_MAIN">
    <location unit="M">
      <x> 0.128909  </x>
      <y>  -0.919246  </y>
      <z>  -0.820845  </z>
    </location>
    <static_friction>  0.80 </static_friction>
    <dynamic_friction> 0.50 </dynamic_friction>
    <rolling_friction> 0.02 </rolling_friction>
	<spring_coeff unit="LBS/FT">2750</spring_coeff>
	<damping_coeff unit="LBS/FT/SEC">1600</damping_coeff>
	<damping_coeff_rebound unit="LBS/FT/SEC">10</damping_coeff_rebound>
    <max_steer unit="DEG">0</max_steer>
    <brake_group> LEFT </brake_group>
    <retractable> 0 </retractable>
  </contact>

  <contact type="BOGEY" name="RIGHT_MAIN">
    <location unit="M">
      <x> 0.128909  </x>
      <y>  0.919246  </y>
      <z>  -0.820845  </z>
    </location>
    <static_friction>  0.80 </static_friction>
    <dynamic_friction> 0.50 </dynamic_friction>
    <rolling_friction> 0.02 </rolling_friction>
	<spring_coeff unit="LBS/FT">2750</spring_coeff>
	<damping_coeff unit="LBS/FT/SEC">1600</damping_coeff>
	<damping_coeff_rebound unit="LBS/FT/SEC">10</damping_coeff_rebound>
    <max_steer unit="DEG">0</max_steer>
    <brake_group> RIGHT </brake_group>
    <retractable> 0 </retractable>
  </contact>

  <contact type="STRUCTURE" name="LEFT_WING">
    <location unit="M">
     <x>  0.176815  </x>
     <y> -4.86388  </y>
     <z>  0.396997  </z>
    </location>
   <static_friction>  1 </static_friction>
   <dynamic_friction> 1 </dynamic_friction>
    <spring_coeff  unit="N/M">     27352.62 </spring_coeff>
    <damping_coeff unit="N/M/SEC"> 13676.31 </damping_coeff>
  </contact>

  <contact type="STRUCTURE" name="RIGHT_WING">
    <location unit="M">
     <x>  0.176815  </x>
     <y> 4.86388  </y>
     <z>  0.396997  </z>
    </location>
   <static_friction>  1 </static_friction>
   <dynamic_friction> 1 </dynamic_friction>
    <spring_coeff  unit="N/M">     27352.62 </spring_coeff>
    <damping_coeff unit="N/M/SEC"> 13676.31 </damping_coeff>
  </contact>

   <system file="fuel.xml"/>
    <contact type="STRUCTURE" name="TAIL">
    <location unit="M">
     <x> 4.13963  </x>
     <y> 0 </y>
     <z>  -0.046462  </z>
    </location>
   <static_friction>  1 </static_friction>
   <dynamic_friction> 1 </dynamic_friction>
    <spring_coeff  unit="N/M">     27352.62 </spring_coeff>
    <damping_coeff unit="N/M/SEC"> 13676.31 </damping_coeff>
  </contact>
      <contact type="STRUCTURE" name="HSTAB">
    <location unit="M">
     <x> 3.76187  </x>
     <y> 0 </y>
     <z>  1.756 </z>
    </location>
   <static_friction>  1 </static_friction>
   <dynamic_friction> 1 </dynamic_friction>
    <spring_coeff  unit="N/M">     27352.62 </spring_coeff>
    <damping_coeff unit="N/M/SEC"> 13676.31 </damping_coeff>
  </contact>
      <contact type="STRUCTURE" name="CABIN">
    <location unit="M">
     <x>-0.346539  </x>
     <y> 0 </y>
     <z> 0.88 </z>
    </location>
   <static_friction>  1 </static_friction>
   <dynamic_friction> 1 </dynamic_friction>
    <spring_coeff  unit="N/M">     27352.62 </spring_coeff>
    <damping_coeff unit="N/M/SEC"> 13676.31 </damping_coeff>
  </contact>

    <contact type="STRUCTURE" name="NOSE_STR">
    <location unit="M">
     <x>-1.94565  </x>
     <y>0</y>
     <z> 0.1249  </z>
    </location>
   <static_friction>  1 </static_friction>
   <dynamic_friction> 1 </dynamic_friction>
    <spring_coeff  unit="N/M">     27352.62 </spring_coeff>
    <damping_coeff unit="N/M/SEC"> 13676.31 </damping_coeff>
  </contact>

      <contact type="STRUCTURE" name="aft_fuselage">
    <location unit="M">
     <x>  3.41196   </x>
     <y>0</y>
     <z> -0.1522 </z>
    </location>
   <static_friction>  1 </static_friction>
   <dynamic_friction> 1 </dynamic_friction>
    <spring_coeff  unit="N/M">     27352.62 </spring_coeff>
    <damping_coeff unit="N/M/SEC"> 13676.31 </damping_coeff>
  </contact>

 </ground_reactions>

<!--
Flight
Control
System -->


 <flight_control name="FCS: PZL-Koliber-160">

  <channel name="Pitch">
   <summer name="Pitch Trim Sum">
      <input>fcs/elevator-cmd-norm</input>
      <input>fcs/pitch-trim-cmd-norm</input>
      <clipto>
        <min> -1 </min>
        <max>  1 </max>
      </clipto>
   </summer>

   <aerosurface_scale name="Elevator Control">
      <input>fcs/pitch-trim-sum</input>
      <range>
        <min> -0.35 </min>
        <max>  0.35 </max>
      </range>
      <output>fcs/elevator-pos-rad</output>
   </aerosurface_scale>

   <aerosurface_scale name="Elevator Normalization">
      <input>fcs/elevator-pos-rad</input>
      <domain>
        <min> -0.35 </min>
        <max>  0.35 </max>
      </domain>
      <range>
        <min> -1 </min>
        <max>  1 </max>
      </range>
      <output>fcs/elevator-pos-norm</output>
   </aerosurface_scale>
  </channel>

  <channel name="Roll">
   <summer name="Roll Trim Sum">
      <input>fcs/aileron-cmd-norm</input>
      <input>fcs/roll-trim-cmd-norm</input>
      <clipto>
        <min> -1 </min>
        <max>  1 </max>
      </clipto>
   </summer>

   <aerosurface_scale name="Left Aileron Control">
      <input>fcs/roll-trim-sum</input>
      <range>
        <min> -0.35 </min>
        <max>  0.35 </max>
      </range>
      <output>fcs/left-aileron-pos-rad</output>
   </aerosurface_scale>

   <aerosurface_scale name="Right Aileron Control">
      <input>-fcs/roll-trim-sum</input>
      <range>
        <min> -0.35 </min>
        <max>  0.35 </max>
      </range>
      <output>fcs/right-aileron-pos-rad</output>
   </aerosurface_scale>

   <aerosurface_scale name="Left Aileron Normalization">
      <input>fcs/left-aileron-pos-rad</input>
      <domain>
        <min> -0.35 </min>
        <max>  0.35 </max>
      </domain>
      <range>
        <min> -1 </min>
        <max>  1 </max>
      </range>
      <output>fcs/left-aileron-pos-norm</output>
   </aerosurface_scale>

   <aerosurface_scale name="Right Aileron Normalization">
      <input>fcs/right-aileron-pos-rad</input>
      <domain>
        <min> -0.35 </min>
        <max>  0.35 </max>
      </domain>
      <range>
        <min> -1 </min>
        <max>  1 </max>
      </range>
      <output>fcs/right-aileron-pos-norm</output>
   </aerosurface_scale>
  </channel>

  <channel name="Yaw">
   <summer name="Rudder Command Sum">
      <input>fcs/rudder-cmd-norm</input>
      <input>fcs/yaw-trim-cmd-norm</input>
      <clipto>
        <min> -1 </min>
        <max>  1 </max>
      </clipto>
   </summer>

   <aerosurface_scale name="Rudder Control">
      <input>fcs/rudder-command-sum</input>
      <range>
        <min> -0.35 </min>
        <max>  0.35 </max>
      </range>
      <output>fcs/rudder-pos-rad</output>
   </aerosurface_scale>

   <aerosurface_scale name="Rudder Normalization">
      <input>fcs/rudder-pos-rad</input>
      <domain>
        <min> -0.35 </min>
        <max>  0.35 </max>
      </domain>
      <range>
        <min> -1 </min>
        <max>  1 </max>
      </range>
      <output>fcs/rudder-pos-norm</output>
   </aerosurface_scale>
  </channel>

  <channel name="Landing Gear">
   <switch name="fcs/gear-no-wow">
     <default value="1"/>
     <test logic="AND" value="0">
         gear/unit[1]/WOW eq 1
         gear/unit[2]/WOW eq 1
     </test>
   </switch>
  </channel>

  <channel name="Flaps">
   <kinematic name="Flaps Control">
    <input>fcs/flap-cmd-norm</input>
    <traverse>
      <setting>
         <position> 15 </position>   <!-- the 950kg MTOW version have always flaps -->
         <time>      0 </time>
      </setting>
      <setting>
         <position> 30 </position>
         <time>      5 </time>
      </setting>
    </traverse>
    <output>fcs/flap-pos-deg</output>
   </kinematic>

   <aerosurface_scale name="Flap Normalization">
    <input>fcs/flap-pos-deg</input>
    <domain>
      <min>  15 </min>
      <max> 30 </max>
    </domain>
    <range>
      <min> 0 </min>
      <max> 1 </max>
    </range>
    <output>fcs/flap-pos-norm</output>
   </aerosurface_scale>
  </channel>

 </flight_control>


 <aerodynamics>

  <axis name="LIFT">

    <function name="aero/force/Lift_propwash">
      <description>Delta lift due to propeller induced velocity</description>
      <product>
         <property>propulsion/engine[0]/thrust-coefficient</property>
          <property>aero/qbar-psf</property>
          <property>metrics/Sw-sqft</property>
          <table>
            <independentVar lookup="row">aero/alpha-rad</independentVar>
            <independentVar lookup="column">fcs/flap-pos-deg</independentVar>
            <tableData>
                     0.0     60.0
              -0.65  0.000   0.000
               0.00  0.286   0.762
               0.44  1.353   3.608
               0.88  0.000   0.000
            </tableData>
          </table>
      </product>
    </function>

    <!-- Lift above 0.85 and below -0.85 is generalised -->
    <function name="aero/force/Lift_alpha">
      <description>Lift due to alpha</description>
      <product>
          <property>aero/qbar-psf</property>
          <property>metrics/Sw-sqft</property>
          <table>
            <independentVar lookup="row">aero/alpha-rad</independentVar>
            <tableData>
              -1.57  0.0000
              -1.22 -0.6005
              -1.05 -0.8090
              -0.88 -0.9342
              -0.34 -0.3615
               0.00  0.6103
               0.46  2.4295
               0.57  0.9718
               0.88  1.0658
               1.05  0.9230
               1.22  0.6851
               1.57  0.0000
            </tableData>
          </table>
      </product>
    </function>

    <function name="aero/force/Lift_pitch_rate">
        <description>Lift due to pitch rate</description>
        <product>
          <property>aero/qbar-psf</property>
          <property>metrics/Sw-sqft</property>
          <property>velocities/q-aero-rad_sec</property>
          <property>aero/ci2vel</property>
          <value> 6.5655 </value>
        </product>
      </function>

      <function name="aero/force/Lift_alpha_rate">
        <description>Lift due to alpha rate</description>
        <product>
           <property>aero/qbar-psf</property>
           <property>metrics/Sw-sqft</property>
           <property>aero/alphadot-rad_sec</property>
           <property>aero/ci2vel</property>
           <value> 2.9180 </value>
        </product>
      </function>

    <function name="aero/force/Lift_elevator">
       <description>Lift due to Elevator Deflection</description>
       <product>
           <property>aero/qbar-psf</property>
           <property>metrics/Sw-sqft</property>
           <property>fcs/elevator-pos-rad</property>
           <value> 0.7361 </value>
       </product>
    </function>

    <function name="aero/force/Lift_flap">
       <description>Delta Lift due to flaps</description>
       <product>
           <property>aero/qbar-psf</property>
           <property>metrics/Sw-sqft</property>
           <property>fcs/flap-pos-deg</property>
           <value> 0.0061 </value>
       </product>
    </function>


  </axis>

  <axis name="DRAG">

    <!-- CD0 is based on fuselage, wing, horizontal- en vertical tail -->
    <!-- CD for gear (fixed and retractable) is defined below         -->
    <function name="aero/force/Drag_minimum">
       <description>Minimum drag</description>
       <product>
          <property>aero/qbar-psf</property>
          <property>metrics/Sw-sqft</property>
          <value> 0.0144 </value>
       </product>
    </function>

    <function name="aero/force/Drag_alpha">
       <description>Drag due to alpha</description>
       <product>
          <property>aero/qbar-psf</property>
          <property>metrics/Sw-sqft</property>
          <table>
            <independentVar lookup="row">aero/alpha-rad</independentVar>
            <tableData>
             -1.57    1.4108
             -0.34    0.1030
              0.00    0.0000
              0.34    0.1030
              1.57    1.4108
            </tableData>
          </table>
       </product>
    </function>

    <function name="aero/force/Drag_induced">
       <description>Induced drag</description>
         <product>
           <property>aero/qbar-psf</property>
           <property>metrics/Sw-sqft</property>
           <property>aero/cl-squared</property>
           <value> 0.0464 </value>
         </product>
    </function>

    <function name="aero/force/Drag_mach">
       <description>Drag due to mach</description>
        <product>
          <property>aero/qbar-psf</property>
          <property>metrics/Sw-sqft</property>
          <table>
            <independentVar lookup="row">velocities/mach</independentVar>
            <tableData>
                0.00    0.0000
                0.70    0.0000
                1.10    0.0230
                1.80    0.0150
            </tableData>
          </table>
        </product>
    </function>

    <function name="aero/force/Drag_beta">
       <description>Drag due to sideslip</description>
       <product>
          <property>aero/qbar-psf</property>
          <property>metrics/Sw-sqft</property>
          <table>
            <independentVar lookup="row">aero/beta-rad</independentVar>
            <tableData>
              -1.57    1.2300
              -0.26    0.0500
               0.00    0.0000
               0.26    0.0500
               1.57    1.2300
            </tableData>
          </table>
       </product>
    </function>

    <function name="aero/force/Drag_elevator">
       <description>Drag due to Elevator Deflection</description>
       <product>
           <property>aero/qbar-psf</property>
           <property>metrics/Sw-sqft</property>
           <abs><property>fcs/elevator-pos-rad</property></abs>
           <value> 0.0400 </value>
       </product>
    </function>

    <function name="aero/force/Drag_gear">
       <description>Drag due to gear</description>
         <product>
           <property>aero/qbar-psf</property>
           <property>metrics/Sw-sqft</property>
           <value> 0.0020 </value>
         </product>
    </function>

    <function name="aero/force/Drag_flap">
       <description>Drag due to flaps</description>
         <product>
           <property>aero/qbar-psf</property>
           <property>metrics/Sw-sqft</property>
           <property>fcs/flap-pos-deg</property>
           <value> 0.0007 </value>
         </product>
    </function>


  </axis>

  <axis name="SIDE">

    <function name="aero/force/Side_beta">
       <description>Side force due to beta</description>
       <product>
           <property>aero/qbar-psf</property>
           <property>metrics/Sw-sqft</property>
           <property>aero/beta-rad</property>
           <value> -0.6681 </value>
       </product>
    </function>
    <function name="aero/force/Side_roll_rate">
       <description>Side force due to roll rate</description>
       <product>
           <property>aero/qbar-psf</property>
           <property>metrics/Sw-sqft</property>
           <property>aero/bi2vel</property>
           <property>velocities/p-aero-rad_sec</property>
           <table>
             <independentVar lookup="row">aero/Re</independentVar>
             <tableData>
                 1996782      0.4543
                 2196461      0.0454
                 2995174      0.0202
                 3984085      0.0114
             </tableData>
           </table>
       </product>
    </function>

    <function name="aero/force/Side_yaw_rate">
       <description>Side force due to yaw rate</description>
       <product>
           <property>aero/qbar-psf</property>
           <property>metrics/Sw-sqft</property>
           <property>aero/bi2vel</property>
           <property>velocities/r-aero-rad_sec</property>
           <value> 0.5362 </value>
       </product>
    </function>

    <function name="aero/force/Side_rudder">
       <description>Side force due to rudder</description>
       <product>
           <property>aero/qbar-psf</property>
           <property>metrics/Sw-sqft</property>
           <property>fcs/rudder-pos-rad</property>
           <value> 0.1997 </value>
       </product>
    </function>

  </axis>

  <axis name="PITCH">

 <function name="aero/moment/Pitch_propwash">
      <description>Pitch moment due to propeller induced velocity</description>
      <product>
          <property>propulsion/engine[0]/thrust-coefficient</property>
          <property>aero/qbar-psf</property>
          <property>metrics/Sw-sqft</property>
          <property>metrics/bw-ft</property>
          <table>
            <independentVar lookup="row">aero/alpha-rad</independentVar>
            <independentVar lookup="column">fcs/flap-pos-deg</independentVar>
            <tableData>
                     0.0     60.0
              -0.01  0.000   0.000
               0.00  0.229   0.611
               0.44  1.085   2.895
               0.57  0.000   0.000
            </tableData>
          </table>
      </product>
    </function>

    <function name="aero/moment/Pitch_alpha">
       <description>Pitch moment due to alpha</description>
       <product>
           <property>aero/qbar-psf</property>
           <property>metrics/Sw-sqft</property>
           <property>metrics/cbarw-ft</property>
           <property>aero/alpha-rad</property>
           <value> -1.1224 </value>
       </product>
    </function>

    <function name="aero/moment/Pitch_elevator">
       <description>Pitch moment due to elevator</description>
       <product>
          <property>aero/qbar-psf</property>
          <property>metrics/Sw-sqft</property>
          <property>metrics/cbarw-ft</property>
          <property>fcs/elevator-pos-rad</property>
          <table>
            <independentVar lookup="row">velocities/mach</independentVar>
            <tableData>
              0.0    -2.0721
              2.0    -0.5180
            </tableData>
          </table>
       </product>
    </function>

    <function name="aero/moment/Pitch_damp">
       <description>Pitch moment due to pitch rate</description>
       <product>
           <property>aero/qbar-psf</property>
           <property>metrics/Sw-sqft</property>
           <property>metrics/cbarw-ft</property>
           <property>aero/ci2vel</property>
           <property>velocities/q-aero-rad_sec</property>
           <value> -19.0450 </value>
       </product>
    </function>

    <function name="aero/moment/Pitch_alphadot">
       <description>Pitch moment due to alpha rate</description>
       <product>
           <property>aero/qbar-psf</property>
           <property>metrics/Sw-sqft</property>
           <property>metrics/cbarw-ft</property>
           <property>aero/ci2vel</property>
           <property>aero/alphadot-rad_sec</property>
           <value> -8.4644 </value>
       </product>
    </function>

  </axis>

  <axis name="ROLL">


    <function name="aero/moment/Roll_differential_propwash">
       <description>Roll moment due to differential propwash</description>
       <product>
           <property>propulsion/engine[0]/thrust-coefficient</property>
           <property>aero/qbar-psf</property>
           <property>metrics/Sw-sqft</property>
           <property>metrics/bw-ft</property>
           <property>aero/alpha-rad</property>
           <value> 0.2352 </value>
       </product>
    </function>


    <function name="aero/moment/Roll_beta">
       <description>Roll moment due to beta</description>
       <product>
           <property>aero/qbar-psf</property>
           <property>metrics/Sw-sqft</property>
           <property>metrics/bw-ft</property>
           <property>aero/beta-rad</property>
           <property>fcs/gear-no-wow</property>
           <table>
             <independentVar lookup="row">aero/alpha-rad</independentVar>
             <independentVar lookup="column">aero/Re</independentVar>
             <tableData>
                             1996782     2196461     2995174     3984085
                 -0.0349     -0.7816     -0.2175     -0.1827     -0.1705
                  0.3491     -0.7817     -0.2175     -0.1827     -0.1706
             </tableData>
           </table>
       </product>
    </function>

    <function name="aero/moment/Roll_damp">
       <description>Roll moment due to roll rate</description>
       <product>
           <property>aero/qbar-psf</property>
           <property>metrics/Sw-sqft</property>
           <property>metrics/bw-ft</property>
           <property>aero/bi2vel</property>
           <property>velocities/p-aero-rad_sec</property>
           <value> -0.5272 </value>
       </product>
    </function>

    <function name="aero/moment/Roll_yaw">
       <description>Roll moment due to yaw rate</description>
       <product>
           <property>aero/qbar-psf</property>
           <property>metrics/Sw-sqft</property>
           <property>metrics/bw-ft</property>
           <property>aero/bi2vel</property>
           <property>velocities/r-aero-rad_sec</property>
           <table>
             <independentVar lookup="row">aero/alpha-rad</independentVar>
             <independentVar lookup="column">aero/Re</independentVar>
             <tableData>
                             1996782     2196461     2995174     3984085
                 -0.0349      0.0890      0.0890      0.0890      0.0890
                  0.3491      6.0565      0.5985      0.5985      0.5985
             </tableData>
           </table>
       </product>
    </function>

    <function name="aero/moment/Roll_aileron">
       <description>Roll moment due to aileron</description>
       <product>
          <property>aero/qbar-psf</property>
          <property>metrics/Sw-sqft</property>
          <property>metrics/bw-ft</property>
          <property>fcs/left-aileron-pos-rad</property>
           <table>
            <independentVar lookup="row">velocities/mach</independentVar>
            <tableData>
              0.0    0.0600
              2.0    0.0150
            </tableData>
          </table>
       </product>
    </function>

    <function name="aero/moment/Roll_rudder">
       <description>Roll moment due to rudder</description>
       <product>
           <property>aero/qbar-psf</property>
           <property>metrics/Sw-sqft</property>
           <property>metrics/bw-ft</property>
           <property>fcs/rudder-pos-rad</property>
           <value> 0.0100 </value>
       </product>
    </function>

  </axis>

  <axis name="YAW">

    <!-- Stall initiator -->
    <function name="aero/moment/Yaw_alpha">
       <description>Yaw moment due to alpha</description>
       <product>
           <property>aero/qbar-psf</property>
           <property>metrics/Sw-sqft</property>
           <property>metrics/bw-ft</property>
           <property>aero/alpha-rad</property>
           <property>fcs/gear-no-wow</property>
           <table>
             <independentVar lookup="row">aero/beta-rad</independentVar>
             <independentVar lookup="column">aero/Re</independentVar>
             <tableData>
                             1996782     2196461
                 -0.3491     -1.0000      0.0000
                  0.3491      1.0000      0.0000
             </tableData>
           </table>
       </product>
    </function>

    <function name="aero/moment/Yaw_beta">
       <description>Yaw moment due to beta</description>
       <product>
           <property>aero/qbar-psf</property>
           <property>metrics/Sw-sqft</property>
           <property>metrics/bw-ft</property>
           <property>aero/beta-rad</property>
           <value> 0.1288 </value>
       </product>
    </function>

    <function name="aero/moment/Yaw_roll_rate">
       <description>Yaw moment due to roll rate</description>
       <product>
           <property>aero/qbar-psf</property>
           <property>metrics/Sw-sqft</property>
           <property>metrics/bw-ft</property>
           <property>aero/bi2vel</property>
           <property>velocities/p-rad_sec</property>
           <table>
             <independentVar lookup="row">aero/Re</independentVar>
             <tableData>
                 1996782     -0.1823
                 2196461     -0.0182
                 2995174     -0.0081
                 3984085     -0.0046
             </tableData>
           </table>
       </product>
    </function>

    <function name="aero/moment/Yaw_damp">
       <description>Yaw moment due to yaw rate</description>
       <product>
           <property>aero/qbar-psf</property>
           <property>metrics/Sw-sqft</property>
           <property>metrics/bw-ft</property>
           <property>aero/bi2vel</property>
           <property>velocities/r-aero-rad_sec</property>
           <value> -0.1388 </value>
       </product>
    </function>

    <function name="aero/moment/Yaw_rudder">
       <description>Yaw moment due to rudder</description>
       <product>
           <property>aero/qbar-psf</property>
           <property>metrics/Sw-sqft</property>
           <property>metrics/bw-ft</property>
           <property>fcs/rudder-pos-rad</property>
           <value> -0.0801 </value>
       </product>
    </function>

    <function name="aero/moment/Yaw_aileron">
       <description>Adverse yaw</description>
       <product>
           <property>aero/qbar-psf</property>
           <property>metrics/Sw-sqft</property>
           <property>metrics/bw-ft</property>
           <property>fcs/left-aileron-pos-rad</property>
           <value> -0.0200 </value>
       </product>
    </function>

  </axis>

 </aerodynamics>

 <external_reactions>
 </external_reactions>


</fdm_config>
