<?xml version="1.0" encoding="UTF-8"?>
<aerodynamics>
	<function name="aero/alpha-wing-deg">
		<todegrees>
			<property>aero/alpha-wing-rad</property>
		</todegrees>
	</function>
	<function name="/orientation/alpha-wing-deg">
		<todegrees>
			<property>aero/alpha-wing-rad</property>
		</todegrees>
	</function>

	<axis name="LIFT">
		<function name="aero/force/Lift_propwash">
			<description>Delta lift due to propeller induced velocity</description>
			<product>
				 <property>propulsion/engine[0]/thrust-coefficient</property>
				<property>aero/qbar-psf</property>
				<property>metrics/Sw-sqft</property>
				<table>
					<independentVar lookup="row">aero/alpha-rad</independentVar>
					<independentVar lookup="column">fcs/flap-pos-deg</independentVar>
					<tableData>
									 0.0		 60.0
						-0.65	0.000	 0.000
						 0.00	0.286	 0.762
						 0.44	1.353	 3.608
						 0.88	0.000	 0.000
					</tableData>
				</table>
			</product>
		</function>

		<function name="aero/force/Lift_alpha">
			<description>Lift due to alpha</description>
			<product>
				<property>aero/qbar-psf</property>
				<property>metrics/Sw-sqft</property>
				<table>
					<independentVar lookup="row">aero/alpha-deg</independentVar>
					<independentVar lookup="column">aero/beta-deg</independentVar>
					<tableData>
								-90.0	-30.0		-15.0		0.0			15.0		30.0	90.0
						-15.0	0	-0.283922	-0.581392	-0.646830	-0.581392	-0.283922	0
						-10.0	0	-0.000208	-0.173754	-0.245816	-0.173754	-0.000208	0
						-5.0	0	0.341877	0.240886	0.151892	0.240886	0.341877	0
						0.0		0	0.611885	0.542817	0.563924	0.542817	0.611885	0
						5.0		0	0.914767	1.004063	1.095216	1.004063	0.914767	0
						10.0	0	1.071324	1.069482	1.089635	1.069482	1.071324	0
						15.0	0	1.166077	1.259999	1.218063	1.259999	1.166077	0
					</tableData>
				</table>
			</product>
		</function>

		<function name="aero/force/Lift_pitch_rate">
			<description>Lift due to pitch rate</description>
			<product>
				<property>aero/qbar-psf</property>
				<property>metrics/Sw-sqft</property>
				<property>velocities/q-aero-rad_sec</property>
				<property>aero/ci2vel</property>
				<value>10.6386397</value>
			</product>
		</function>

		<function name="aero/force/Lift_alpha_rate">
			<description>Lift due to alpha rate</description>
			<product>
				 <property>aero/qbar-psf</property>
				 <property>metrics/Sw-sqft</property>
				 <property>aero/alphadot-rad_sec</property>
				 <property>aero/ci2vel</property>
				 <value> 2.9180 </value>
			</product>
		</function>

		<function name="aero/force/Lift_elevator">
			 <description>Lift due to Elevator Deflection</description>
			 <product>
					 <property>aero/qbar-psf</property>
					 <property>metrics/Sw-sqft</property>
					 <property>fcs/elevator-pos-rad</property>
					 <value>0.3640748</value>
			 </product>
		</function>

		<function name="aero/force/Lift_flap">
			 <description>Delta Lift due to flaps</description>
			 <product>
					 <property>aero/qbar-psf</property>
					 <property>metrics/Sw-sqft</property>
					<property>fcs/flap-pos-rad</property>
					<value>0.5625677</value>
			 </product>
		</function>
	</axis>

	<axis name="DRAG">
		<function name="aero/force/Drag_base">
			 <description>Minimum, induced and sideslip drag</description>
			 <product>
				<property>aero/qbar-psf</property>
				<property>metrics/Sw-sqft</property>
				<sum>
					<table>
						<independentVar lookup="row">aero/alpha-deg</independentVar>
						<independentVar lookup="column">aero/beta-deg</independentVar>
						<tableData>
									-30.0		-15.0		0.0		15.0		30.0
							-15.0	0.288161	0.283280	0.045725	0.283280	0.288161
							-10.0	0.366193	0.277001	0.025452	0.277001	0.366193
							-5.0	0.308384	0.099464	0.021328	0.099464	0.308384
							0.0		0.438560	0.491901	0.037527	0.491901	0.438560
							5.0		0.462797	0.336902	0.089737	0.336902	0.462797
							10.0	0.741236	0.298135	0.216345	0.298135	0.741236
							15.0	0.706618	0.427899	0.298429	0.427899	0.706618
						</tableData>
					</table>
					<value>0.01128</value> <!-- correction value -->
				</sum>
			</product>
		</function>

		<function name="aero/force/Drag_pitch_rate">
			<description>Drag due to pitch rate</description>
			<product>
				<property>aero/qbar-psf</property>
				<property>metrics/Sw-sqft</property>
				<property>velocities/q-aero-rad_sec</property>
				<property>aero/ci2vel</property>
				<value>0.0234552</value>
			</product>
		</function>

		<function name="aero/force/Drag_elevator">
			 <description>Drag due to Elevator Deflection</description>
			 <product>
					<property>aero/qbar-psf</property>
					<property>metrics/Sw-sqft</property>
					<property>fcs/mag-elevator-pos-rad</property>
					<value>0.1032179</value>
			 </product>
		</function>

		<function name="aero/force/Drag_gear">
			 <description>Drag due to gear</description>
				 <product>
					 <property>aero/qbar-psf</property>
					 <property>metrics/Sw-sqft</property>
					 <value> 0.0020 </value>
				 </product>
		</function>

		<function name="aero/force/Drag_flap">
			 <description>Drag due to flaps</description>
				 <product>
					 <property>aero/qbar-psf</property>
					 <property>metrics/Sw-sqft</property>
					 <property>fcs/flap-pos-rad</property>
					 <value>0.1226068</value>
				 </product>
		</function>

		<function name="aero/force/Drag_rudder">
			<description>Drag due to rudder</description>
			<product>
				<property>aero/qbar-psf</property>
				<property>metrics/Sw-sqft</property>
				<property>fcs/mag-rudder-pos-rad</property>
				<value>0.2678540</value>
			</product>
		</function>

		<function name="aero/force/Drag_ailerons">
			<description>Drag due to aileron deflection</description>
			<product>
				<property>aero/qbar-psf</property>
				<property>metrics/Sw-sqft</property>
				<property>fcs/mag-aileron-pos-rad</property>
				<value>0.0498461</value>
			</product>
		</function>
	</axis>

	<axis name="SIDE">
		<function name="aero/force/Side_beta">
			 <description>Side force due to beta</description>
			 <product>
				 <property>aero/qbar-psf</property>
				 <property>metrics/Sw-sqft</property>
				<table>
					<independentVar lookup="row">aero/alpha-deg</independentVar>
					<independentVar lookup="column">aero/beta-deg</independentVar>
					<tableData>
								-30.0		-15.0		0.0		15.0		30.0
						-15.0	0.134875	0.096933	0	-0.096933	-0.134875
						-10.0	0.128255	0.102646	0	-0.102646	-0.128255
						-5.0	0.188331	0.142467	0	-0.142467	-0.188331
						0.0		0.153352	0.113836	0	-0.113836	-0.153352
						5.0		0.149431	0.123152	0	-0.123152	-0.149431
						10.0	0.088276	0.090365	0	-0.090365	-0.088276
						15.0	0.071066	0.097903	0	-0.097903	-0.071066
					</tableData>
				</table>
			 </product>
		</function>

		<function name="aero/force/Side_roll_rate">
			 <description>Side force due to roll rate</description>
			 <product>
					 <property>aero/qbar-psf</property>
					 <property>metrics/Sw-sqft</property>
					 <property>aero/bi2vel</property>
					 <property>velocities/p-aero-rad_sec</property>
					 <value>-0.5566593</value>
					 <value>-1</value>
			 </product>
		</function>

		<function name="aero/force/Side_yaw_rate">
			 <description>Side force due to yaw rate</description>
			 <product>
					 <property>aero/qbar-psf</property>
					 <property>metrics/Sw-sqft</property>
					 <property>aero/bi2vel</property>
					 <property>velocities/r-aero-rad_sec</property>
					 <value>0.4049094</value>
			 </product>
		</function>

		<function name="aero/force/Side_rudder">
			 <description>Side force due to rudder</description>
			 <product>
					 <property>aero/qbar-psf</property>
					 <property>metrics/Sw-sqft</property>
					 <property>fcs/rudder-pos-rad</property>
					 <value>0.1924163</value>
			 </product>
		</function>
	</axis>

	<axis name="PITCH">
		 <!--<function name="aero/moment/Pitch_propwash">
			<description>Pitch moment due to propeller induced velocity</description>
			<product>
					<property>propulsion/engine[0]/thrust-coefficient</property>
					<property>aero/qbar-psf</property>
					<property>metrics/Sw-sqft</property>
					<property>metrics/bw-ft</property>
					<table>
						<independentVar lookup="row">aero/alpha-rad</independentVar>
						<independentVar lookup="column">fcs/flap-pos-deg</independentVar>
						<tableData>
										 0.0		 60.0
							-0.01	0.000	 0.000
							 0.00	0.229	 0.611
							 0.44	1.085	 2.895
							 0.57	0.000	 0.000
						</tableData>
					</table>
			</product>
		</function>-->

		<function name="aero/moment/Pitch_alpha">
			 <description>Pitch moment due to alpha</description>
			 <product>
				<property>aero/qbar-psf</property>
				<property>metrics/Sw-sqft</property>
				<property>metrics/cbarw-ft</property>
				<table>
					<independentVar lookup="row">aero/alpha-deg</independentVar>
					<independentVar lookup="column">aero/beta-deg</independentVar>
					<tableData>
								-30.0		-15.0		0.0		15.0		30.0
						-15.0	0.1			0.15		0.188192	0.15		0.1
						-10.0	0.224250	0.240420	0.153069	0.240520	0.216080
						-5.0	0.118200	0.129810	0.090467	0.129740	0.113370
						0.0		0.029240	0.019500	-0.025490	0.019480	0.025910
						5.0		-0.116940	-0.098530	-0.213869	-0.098380	-0.118840
						10.0	-0.150080	-0.252820	-0.377780	-0.252710	-0.151350
						15.0	-0.294310	-0.413890	-0.534001	-0.414060	-0.294590
					</tableData>
				</table>
			 </product>
		</function>

		<function name="aero/moment/Pitch_elevator">
			 <description>Pitch moment due to elevator</description>
			 <product>
					<property>aero/qbar-psf</property>
					<property>metrics/Sw-sqft</property>
					<property>metrics/cbarw-ft</property>
					<property>fcs/elevator-pos-rad</property>
					<value>-1.0137362</value>
			 </product>
		</function>

		<function name="aero/moment/Pitch_flaps">
			 <description>Pitch moment due to flaps</description>
			 <product>
				<property>aero/qbar-psf</property>
				<property>metrics/Sw-sqft</property>
				<property>metrics/cbarw-ft</property>
				<property>fcs/flap-pos-rad</property>
				<value>0.2162358</value>
			</product>
		</function>

		<function name="aero/moment/Pitch_damp">
			 <description>Pitch moment due to pitch rate</description>
			 <product>
					 <property>aero/qbar-psf</property>
					 <property>metrics/Sw-sqft</property>
					 <property>metrics/cbarw-ft</property>
					 <property>aero/ci2vel</property>
					 <property>velocities/q-aero-rad_sec</property>
					 <value>-24.0545652</value>
			 </product>
		</function>

		<function name="aero/moment/Pitch_alphadot">
			 <description>Pitch moment due to alpha rate</description>
			 <product>
					 <property>aero/qbar-psf</property>
					 <property>metrics/Sw-sqft</property>
					 <property>metrics/cbarw-ft</property>
					 <property>aero/ci2vel</property>
					 <property>aero/alphadot-rad_sec</property>
					 <value> -8.4644 </value>
			 </product>
		</function>
	</axis>

	<axis name="ROLL">
		<function name="aero/moment/Roll_differential_propwash">
			 <description>Roll moment due to differential propwash</description>
			 <product>
				 <property>propulsion/engine[0]/thrust-coefficient</property>
				 <property>aero/qbar-psf</property>
				 <property>metrics/Sw-sqft</property>
				 <property>metrics/bw-ft</property>
				 <property>aero/alpha-rad</property>
				 <value> 0.2352 </value>
			 </product>
		</function>

		<function name="aero/moment/Roll_beta">
			 <description>Roll moment due to beta</description>
			 <product>
				<property>aero/qbar-psf</property>
				<property>metrics/Sw-sqft</property>
				<property>metrics/bw-ft</property>
				<table>
					<independentVar lookup="row">aero/alpha-deg</independentVar>
					<independentVar lookup="column">aero/beta-deg</independentVar>
					<tableData>
								-30.0		-15.0		0.0		15.0		30.0
						-15.0	-0.047080	-0.027056	0.000013	0.027056	0.047080
						-10.0	-0.043496	-0.029911	-0.000074	0.029911	0.043496
						-5.0	-0.043415	-0.040270	0.000588	0.040270	0.043415
						0.0		-0.050459	-0.037924	-0.010374	0.037924	0.050459
						5.0		-0.046961	-0.029660	-0.001857	0.029660	0.046961
						10.0	-0.038544	-0.029469	-0.013585	0.029469	0.038544
						15.0	-0.025232	-0.029308	-0.046913	0.029308	0.025232
					</tableData>
				</table>
				<value>-1</value>
			 </product>
		</function>

		<function name="aero/moment/Roll_damp">
			 <description>Roll moment due to roll rate</description>
			 <product>
				 <property>aero/qbar-psf</property>
				 <property>metrics/Sw-sqft</property>
				 <property>metrics/bw-ft</property>
				 <property>aero/bi2vel</property>
				 <property>velocities/p-aero-rad_sec</property>
				 <value>-0.8083334</value>
			 </product>
		</function>

		<function name="aero/moment/Roll_yaw">
			 <description>Roll moment due to yaw rate</description>
			 <product>
				 <property>aero/qbar-psf</property>
				 <property>metrics/Sw-sqft</property>
				 <property>metrics/bw-ft</property>
				 <property>aero/bi2vel</property>
				 <property>velocities/r-aero-rad_sec</property>
				 <value>0.2087421</value>
			 </product>
		</function>

		<function name="aero/moment/Roll_aileron">
			 <description>Roll moment due to aileron</description>
			 <product>
				<property>aero/qbar-psf</property>
				<property>metrics/Sw-sqft</property>
				<property>metrics/bw-ft</property>
				<property>fcs/aileron-pos-rad</property>
				<value>0.1496594</value>
			 </product>
		</function>

		<function name="aero/moment/Roll_rudder">
			 <description>Roll moment due to rudder</description>
			 <product>
				 <property>aero/qbar-psf</property>
				 <property>metrics/Sw-sqft</property>
				 <property>metrics/bw-ft</property>
				 <property>fcs/rudder-pos-rad</property>
				 <value>0.0214626</value>
			 </product>
		</function>
	</axis>

	<axis name="YAW">
		<function name="aero/moment/Yaw_beta">
			 <description>Yaw moment due to beta</description>
			 <product>
				<property>aero/qbar-psf</property>
				<property>metrics/Sw-sqft</property>
				<property>metrics/bw-ft</property>
				<table>
					<independentVar lookup="row">aero/alpha-deg</independentVar>
					<independentVar lookup="column">aero/beta-deg</independentVar>
					<tableData>
								-30			-15			0	15			30
						-15.0	0.048615	0.025994	0	-0.025994	-0.048615
						-10.0	0.040056	0.028386	0	-0.028386	-0.040056
						-5.0	0.019944	0.020648	0	-0.020648	-0.019944
						0.0		0.026528	0.025761	0	-0.025761	-0.026528
						5.0		0.047430	0.019660	0	-0.019660	-0.047430
						10.0	0.042435	0.016494	0	-0.016494	-0.042435
						15.0	0.056351	0.009246	0	-0.009246	-0.056351
					</tableData>
				</table>
				<value>-1</value>
			 </product>
		</function>

		<function name="aero/moment/Yaw_roll_rate">
			 <description>Yaw moment due to roll rate</description>
			 <product>
				 <property>aero/qbar-psf</property>
				 <property>metrics/Sw-sqft</property>
				 <property>metrics/bw-ft</property>
				 <property>aero/bi2vel</property>
				 <property>velocities/p-rad_sec</property>
				 <value>-0.0510684</value>
			 </product>
		</function>

		<function name="aero/moment/Yaw_damp">
			 <description>Yaw moment due to yaw rate</description>
			 <product>
				 <property>aero/qbar-psf</property>
				 <property>metrics/Sw-sqft</property>
				 <property>metrics/bw-ft</property>
				 <property>aero/bi2vel</property>
				 <property>velocities/r-aero-rad_sec</property>
				 <value>-0.2198178</value>
			 </product>
		</function>

		<function name="aero/moment/Yaw_rudder">
			 <description>Yaw moment due to rudder</description>
			 <product>
				 <property>aero/qbar-psf</property>
				 <property>metrics/Sw-sqft</property>
				 <property>metrics/bw-ft</property>
				 <property>fcs/rudder-pos-rad</property>
				 <value>-0.0813419 </value>
			 </product>
		</function>

		<function name="aero/moment/Yaw_aileron">
			 <description>Adverse yaw</description>
			 <product>
				 <property>aero/qbar-psf</property>
				 <property>metrics/Sw-sqft</property>
				 <property>metrics/bw-ft</property>
				 <property>fcs/aileron-pos-rad</property>
				 <value>-0.0052027</value>
			 </product>
		</function>
	</axis>
 </aerodynamics>
