<?xml version="1.0" encoding="UTF-8"?>
<!--
    This file is part of PZL Koliber family for FlightGear available at https://github.com/SP-NTX/PZL-Koliber-family licensed under GNU General Public License v2.0. See LICENSE file.
    Copyright (c) 2022-2025 SP-NTX, jakkos98, TheFGFSEagle, sryu1, and others.
-->

<aerodynamics>
	<property value="-5.58">metrics/left-flap-arm-y-ft</property>
	<property value="5.58">metrics/right-flap-arm-y-ft</property>
	<property value="-8.12">metrics/left-slat-arm-y-ft</property>
	<property value="8.12">metrics/right-slat-arm-y-ft</property>

	<function name="aero/alpha-wing-deg">
		<todegrees>
			<property>aero/alpha-wing-rad</property>
		</todegrees>
	</function>
	<function name="/orientation/alpha-wing-deg">
		<todegrees>
			<property>aero/alpha-wing-rad</property>
		</todegrees>
	</function>

	<axis name="LIFT">
		<function name="aero/force/Lift_alpha">
			<description>Lift due to alpha</description>
			<product>
				<property>aero/qbar-psf</property>
				<property>metrics/Sw-sqft</property>
				<table>
					<independentVar lookup="row">aero/alpha-deg</independentVar>
					<independentVar lookup="column">aero/beta-deg</independentVar>
					<tableData>
								-90.0	-30.0		-15.0		0.0			15.0		30.0	90.0
						-15.0	0	-0.540394	-0.781308	-0.875339	-0.781308	-0.540394	0
						-10.0	0	-0.254968	-0.370858	-0.427278	-0.370858	-0.254968	0
						-5.0	0	0.063302	0.024685	0.026289	0.024685	0.063302	0
						0.0		0	0.397975	0.461679	0.481605	0.461679	0.397975	0
						5.0		0	0.726558	0.875767	0.934980	0.875767	0.726558	0
						10.0	0	1.037833	1.292242	1.382487	1.292242	1.037833	0
						15.0	0	1.287831	1.576316	1.589818	1.576316	1.287831	0
						20.0	0	1.556316	1.661274	1.734428	1.661274	1.556316	0
					</tableData>
				</table>
			</product>
		</function>

		<function name="aero/force/Lift_pitch_rate">
			<description>Lift due to pitch rate</description>
			<product>
				<property>aero/qbar-psf</property>
				<property>metrics/Sw-sqft</property>
				<property>velocities/q-aero-rad_sec</property>
				<property>aero/ci2vel</property>
				<value>11.0067269</value>
			</product>
		</function>

		<function name="aero/force/Lift_alpha_rate">
			<description>Lift due to alpha rate</description>
			<product>
				<property>aero/qbar-psf</property>
				<property>metrics/Sw-sqft</property>
				<property>aero/alphadot-rad_sec</property>
				<property>aero/ci2vel</property>
				<value> 2.9180 </value>
			</product>
		</function>

		<function name="aero/force/Lift_elevator">
			<description>Lift due to Elevator Deflection</description>
			<product>
				<property>aero/qbar-psf</property>
				<property>metrics/Sw-sqft</property>
				<property>fcs/elevator-pos-rad</property>
				<value>0.3640748</value>
			</product>
		</function>

		<function name="aero/force/Lift_flaps">
			<description>Delta lift due to flaps</description>
			<product>
				<property>aero/qbar-psf</property>
				<property>metrics/Sw-sqft</property>
				<sum>
					<table>
						<independentVar lookup="row">aero/alpha-deg</independentVar>
						<independentVar lookup="column">aero/beta-deg</independentVar>
						<independentVar lookup="table">fcs/flap-pos-norm</independentVar>
						<tableData breakPoint="0">
								-30	30
							-15	0	0
							15	0	0
						</tableData>
						<tableData breakPoint="0.5">
									-90.0	-30.0		-15.0		0.0			15.0		30.0		90.0
							-15.0	0		0.235999	0.450523	0.49308	0.450523	0.235999	0
							-10.0	0		0.314702	0.443206	0.488457	0.443206	0.314702	0
							-5.0	0		0.325435	0.511099	0.482213	0.461729	0.325435	0
							0.0		0		0.251845	0.435315	0.476799	0.435315	0.251845	0
							5.0		0		0.236203	0.200156	0.224483	0.200156	0.236203	0
							10.0	0		0.014514	-0.155263	-0.209329	-0.155263	0.014514	0
							15.0	0		-0.04737	-0.563945	-0.55616	-0.563945	-0.04737	0
							20.0	0		-0.438805	-0.789238	-0.921021	-0.789238	-0.438805	0
						</tableData>
						<tableData breakPoint="1">
									-90.0	-30.0		-15.0		0.0			15.0		30.0		90.0
							-15.0	0		0.537474	0.774004	0.847922	0.788612	0.537474	0
							-10.0	0		0.584706	0.787965	0.846607	0.787965	0.584706	0
							-5.0	0		0.565717	0.790000	0.842289	0.790000	0.565717	0
							0.0		0		0.545977	0.698265	0.729074	0.698265	0.545977	0
							5.0		0		0.394930	0.412758	0.429089	0.412758	0.394930	0
							10.0	0		0.168029	-0.077274	-0.183524	-0.077274	0.168029	0
							15.0	0		-0.187658	-0.520359	-0.625371	-0.520359	-0.187658	0
							20.0	0		-0.432130	-0.776758	-0.898887	-0.776758	-0.432130	0
						</tableData>
					</table>
					<!-- correction value -->
					<table>
						<independentVar lookup="row">aero/alpha-deg</independentVar>
						<independentVar lookup="column">aero/beta-deg</independentVar>
						<independentVar lookup="table">fcs/flap-pos-norm</independentVar>
						<tableData breakPoint="0">
								-30	30
							-15	0	0
							20	0	0
						</tableData>
						<tableData breakPoint="0.5">
									-90.0	-30.0		-15.0		0.0			15.0		30.0		90.0
							-15.0	0		-0.139563	-0.283739	-0.317216	-0.283739	-0.139563	0
							-10.0	0		-0.178606	-0.275213	-0.311405	-0.275213	-0.178606	0
							-5.0	0		-0.18997	-0.336928	-0.302155	-0.287558	-0.18997	0
							0.0		0		-0.182377	-0.255181	-0.292157	-0.255181	-0.182377	0
							5.0		0		-0.125245	-0.133475	-0.146458	-0.133475	-0.125245	0
							10.0	0		0.019388	0.204661	0.223202	0.204661	0.019388	0
							15.0	0		0.119686	0.546702	0.517843	0.546702	0.119686	0
							20.0	0		0.39706	0.787765	0.885865	0.787765	0.39706	0
						</tableData>
					</table>
				</sum>
			</product>
		</function>

		<function name="aero/force/Lift_left_slat">
			 <description>Delta lift due to left slat</description>
			 <product>
				<property>aero/qbar-psf</property>
				<property>metrics/Sw-sqft</property>
				<table>
					<independentVar lookup="row">aero/alpha-deg</independentVar>
					<independentVar lookup="column">aero/beta-deg</independentVar>
					<independentVar lookup="table">fcs/left-slat-pos-norm</independentVar>
					<tableData breakPoint="0">
							-30	30
						-15	0	0
						15	0	0
					</tableData>
					<tableData breakPoint="1">
								-90.0	-30.0		-15.0		0.0			15.0		30.0		90.0
						-15.0	0		-0.032097	-0.028611	-0.032128	-0.028611	-0.032097	0
						-10.0	0		-0.038241	-0.023356	-0.023481	-0.023356	-0.038241	0
						-5.0	0		-0.015382	0.013715	0.029892	0.013715	-0.015382	0
						0.0		0		0.009467	0.019562	0.052707	0.019562	0.009467	0
						5.0		0		0.017447	0.036100	0.127560	0.036100	0.017447	0
						10.0	0		0.111888	0.209760	0.275249	0.209760	0.111888	0
						15.0	0		0.188013	0.202437	0.325030	0.202437	0.188013	0
					</tableData>
				</table>
			</product>
		</function>
		<function name="aero/force/Lift_right_slat">
			 <description>Delta lift due to right slat</description>
			 <product>
				<property>aero/qbar-psf</property>
				<property>metrics/Sw-sqft</property>
				<table>
					<independentVar lookup="row">aero/alpha-deg</independentVar>
					<independentVar lookup="column">aero/beta-deg</independentVar>
					<independentVar lookup="table">fcs/right-slat-pos-norm</independentVar>
					<tableData breakPoint="0">
							-30	30
						-15	0	0
						15	0	0
					</tableData>
					<tableData breakPoint="1">
								-90.0	-30.0		-15.0		0.0			15.0		30.0		90.0
						-15.0	0		-0.032097	-0.028611	-0.032128	-0.028611	-0.032097	0
						-10.0	0		-0.038241	-0.023356	-0.023481	-0.023356	-0.038241	0
						-5.0	0		-0.015382	0.013715	0.029892	0.013715	-0.015382	0
						0.0		0		0.009467	0.019562	0.052707	0.019562	0.009467	0
						5.0		0		0.017447	0.036100	0.127560	0.036100	0.017447	0
						10.0	0		0.111888	0.209760	0.275249	0.209760	0.111888	0
						15.0	0		0.188013	0.202437	0.325030	0.202437	0.188013	0
					</tableData>
				</table>
			</product>
		</function>
	</axis>

	<axis name="DRAG">
		<function name="aero/force/Drag_base">
			<description>Base drag</description>
			<product>
				<property>aero/qbar-psf</property>
				<property>metrics/Sw-sqft</property>
				<table>
					<independentVar lookup="row">aero/alpha-deg</independentVar>
					<independentVar lookup="column">aero/beta-deg</independentVar>
					<tableData>
								-30.0		-15.0		0.0			15.0		30.0
						-15.0	0.018443	0.019013	0.019398	0.019013	0.018443
						-10.0	0.016979	0.016803	0.016789	0.016803	0.016979
						-5.0	0.016626	0.016494	0.016181	0.016494	0.016626
						0.0		0.017420	0.017558	0.017599	0.017558	0.017420
						5.0		0.019289	0.020453	0.020935	0.020453	0.019289
						10.0	0.022104	0.024775	0.025947	0.024775	0.022104
						15.0	0.025743	0.028160	0.027928	0.028160	0.025743
						20.0	0.027867	0.028507	0.028887	0.028507	0.027867
					</tableData>
				</table>
				<value>1.94</value> <!-- correction value -->
			</product>
		</function>

		<function name="aero/force/Drag_induced">
			<description>Induced drag and drag due to sideslip</description>
			<product>
				<property>aero/qbar-psf</property>
				<property>metrics/Sw-sqft</property>
				<table>
					<independentVar lookup="row">aero/alpha-deg</independentVar>
					<independentVar lookup="column">aero/beta-deg</independentVar>
					<tableData>
								-30.0		-15.0		0.0		15.0		30.0
						-15.0	0.125335	0.040267	0.042112	0.040267	0.125335
						-10.0	0.013011	0.015805	0.011775	0.015805	0.013011
						-5.0	0.044224	0.017495	0.000329	0.017495	0.044224
						0.0		0.053834	0.017892	0.008518	0.017892	0.053834
						5.0		0.077791	0.044539	0.036576	0.044539	0.077791
						10.0	0.123404	0.086716	0.084181	0.086716	0.123404
						15.0	0.237104	0.175873	0.206597	0.175873	0.237104
						20.0	0.241842	0.339873	0.356782	0.339873	0.241842
					</tableData>
				</table>
			</product>
		</function>

		<function name="aero/force/Drag_pitch_rate">
			<description>Drag due to pitch rate</description>
			<product>
				<property>aero/qbar-psf</property>
				<property>metrics/Sw-sqft</property>
				<property>velocities/q-aero-rad_sec</property>
				<property>aero/ci2vel</property>
				<value>0.0200187</value>
			</product>
		</function>

		<function name="aero/force/Drag_elevator">
			<description>Drag due to Elevator Deflection</description>
			<product>
				<property>aero/qbar-psf</property>
				<property>metrics/Sw-sqft</property>
				<property>fcs/mag-elevator-pos-rad</property>
				<value>0.1032179</value>
			</product>
		</function>

		<function name="aero/force/Drag_gear">
			<description>Drag due to gear</description>
			<product>
				<property>aero/qbar-psf</property>
				<property>metrics/Sw-sqft</property>
				<value> 0.0020 </value>
			</product>
		</function>

		<function name="aero/force/Drag_flaps">
			<description>Drag due to flaps</description>
			<product>
				<property>aero/qbar-psf</property>
				<property>metrics/Sw-sqft</property>
				<sum>
					<table>
						<independentVar lookup="row">aero/alpha-deg</independentVar>
						<independentVar lookup="column">aero/beta-deg</independentVar>
						<independentVar lookup="table">fcs/flap-pos-norm</independentVar>
						<tableData breakPoint="0">
								-30	30
							-15	0	0
							15	0	0
						</tableData>
						<tableData breakPoint="0.5">
									-30.0		-15.0		0.0			15.0		30.0
							-15.0	0.005814	0.023663	0.020115	0.023663	0.005814
							-10.0	0.044884	0.014955	0.006430	0.014955	0.044884
							-5.0	0.036473	0.019446	0.009573	0.019446	0.036473
							0.0		0.030507	0.037199	0.030244	0.037199	0.030507
							5.0		0.091505	0.137905	0.129825	0.137905	0.091505
							10.0	0.139418	0.264979	0.289107	0.264979	0.139418
							15.0	0.351726	0.391736	0.490350	0.391736	0.351726
							20.0	0.407911	0.605633	0.820479	0.605633	0.407911
						</tableData>
						<tableData breakPoint="1">
									-30.0		-15.0		0.0			15.0		30.0
							-15.0	-0.051858	0.033959	0.028656	0.033959	-0.051858
							-10.0	0.063773	0.054961	0.056418	0.054961	0.063773
							-5.0	0.061262	0.068092	0.083523	0.068092	0.061262
							0.0		0.067720	0.122362	0.138507	0.122362	0.067720
							5.0		0.101445	0.200387	0.235565	0.200387	0.101445
							10.0	0.150431	0.320451	0.401733	0.320451	0.150431
							15.0	0.200758	0.447954	0.510654	0.447954	0.200758
							20.0	0.361273	0.477484	0.591392	0.477484	0.361273
						</tableData>
					</table>
					<!-- correction value -->
					<table>
						<independentVar lookup="row">aero/alpha-deg</independentVar>
						<independentVar lookup="column">aero/beta-deg</independentVar>
						<independentVar lookup="table">fcs/flap-pos-norm</independentVar>
						<tableData breakPoint="0">
								-30	30
							-15	0	0
							20	0	0
						</tableData>
						<tableData breakPoint="0.5">
									-30.0		-15.0		0.0			15.0		30.0
							-15.0	0.090784	0.000818	0.007386	0.000818	0.090784
							-10.0	-0.048204	-0.006973	-0.001523	-0.006973	-0.048204
							-5.0	-0.002326	0.000557	-0.010312	0.000557	-0.002326
							0.0		-0.004795	-0.01441	-0.018601	-0.01441	-0.004795
							5.0		-0.001456	-0.045283	-0.061615	-0.045283	-0.001456
							10.0	-0.041497	-0.149526	-0.138329	-0.149526	-0.041497
							15.0	-0.017451	-0.120793	-0.239266	-0.120793	-0.017451
							20.0	-0.174834	-0.161077	-0.376039	-0.161077	-0.174834
						</tableData>
					</table>
				</sum>
			</product>
		</function>

		<!--<function name="aero/force/Drag_left_slat">
			 <description>Drag due to left slat</description>
			 <product>
				 <property>aero/qbar-psf</property>
				 <property>metrics/Sw-sqft</property>
				<table>
					<independentVar lookup="row">aero/alpha-deg</independentVar>
					<independentVar lookup="column">aero/beta-deg</independentVar>
					<independentVar lookup="table">fcs/left-slat-pos-norm</independentVar>
					<tableData breakPoint="0">
							-30	30
						-15	0	0
						15	0	0
					</tableData>
					<tableData breakPoint="1">
								-30		0		30
						-15		0.003	0.005	0.003
						-5		0.0012	0.002	0.0012
						5		0.003	0.005	0.003
						10		0.006	0.01	0.006
						15		0.03	0.05	0.03
					</tableData>
				</table>
			 </product>
		</function>
		<function name="aero/force/Drag_right_slat">
			 <description>Drag due to right slat</description>
			 <product>
				 <property>aero/qbar-psf</property>
				 <property>metrics/Sw-sqft</property>
				<table>
					<independentVar lookup="row">aero/alpha-deg</independentVar>
					<independentVar lookup="column">aero/beta-deg</independentVar>
					<independentVar lookup="table">fcs/right-slat-pos-norm</independentVar>
					<tableData breakPoint="0">
							-30	30
						-15	0	0
						15	0	0
					</tableData>
					<tableData breakPoint="1">
								-30		0		30
						-15		0.003	0.005	0.003
						-5		0.0012	0.002	0.0012
						5		0.003	0.005	0.003
						10		0.006	0.01	0.006
						15		0.03	0.05	0.03
					</tableData>
				</table>
			 </product>
		</function>-->

		<function name="aero/force/Drag_rudder">
			<description>Drag due to rudder</description>
			<product>
				<property>aero/qbar-psf</property>
				<property>metrics/Sw-sqft</property>
				<property>fcs/mag-rudder-pos-rad</property>
				<value>0.2678540</value>
			</product>
		</function>

		<function name="aero/force/Drag_ailerons">
			<description>Drag due to aileron deflection</description>
			<product>
				<property>aero/qbar-psf</property>
				<property>metrics/Sw-sqft</property>
				<property>fcs/mag-aileron-pos-rad</property>
				<value>0.0498461</value>
			</product>
		</function>
	</axis>

	<axis name="SIDE">
		<function name="aero/force/Side_beta">
			<description>Side force due to beta</description>
			<product>
				<property>aero/qbar-psf</property>
				<property>metrics/Sw-sqft</property>
				<table>
					<independentVar lookup="row">aero/alpha-deg</independentVar>
					<independentVar lookup="column">aero/beta-deg</independentVar>
					<tableData>
								-30.0		-15.0		0.0		15.0		30.0
						-15.0	0.079096	0.067484	0	-0.067484	-0.079096
						-10.0	0.150229	0.075222	0	-0.075222	-0.150229
						-5.0	0.136126	0.064491	0	-0.064491	-0.136126
						0.0		0.132815	0.076911	0	-0.076911	-0.132815
						5.0		0.120901	0.071054	0	-0.071054	-0.120901
						10.0	0.096920	0.058892	0	-0.058892	-0.096920
						15.0	0.035791	0.044789	0	-0.044789	-0.035791
						20.0	0.048991	0.037595	0	-0.037595	-0.048991
					</tableData>
				</table>
			</product>
		</function>

		<function name="aero/force/Side_roll_rate">
			<description>Side force due to roll rate</description>
			<product>
				<property>aero/qbar-psf</property>
				<property>metrics/Sw-sqft</property>
				<property>aero/bi2vel</property>
				<property>velocities/p-aero-rad_sec</property>
				<value>-0.2076146</value>
				<value>-1</value>
			</product>
		</function>

		<function name="aero/force/Side_yaw_rate">
			<description>Side force due to yaw rate</description>
			<product>
				<property>aero/qbar-psf</property>
				<property>metrics/Sw-sqft</property>
				<property>aero/bi2vel</property>
				<property>velocities/r-aero-rad_sec</property>
				<value>0.3062364</value>
			</product>
		</function>

		<function name="aero/force/Side_rudder">
			<description>Side force due to rudder</description>
			<product>
				<property>aero/qbar-psf</property>
				<property>metrics/Sw-sqft</property>
				<property>fcs/rudder-pos-rad</property>
				<value>0.1924163</value>
			</product>
		</function>
	</axis>

	<axis name="PITCH">
		<!--<function name="aero/moment/Pitch_propwash">
			<description>Pitch moment due to propeller induced velocity</description>
			<product>
					<property>propulsion/engine[0]/thrust-coefficient</property>
					<property>aero/qbar-psf</property>
					<property>metrics/Sw-sqft</property>
					<property>metrics/bw-ft</property>
					<table>
						<independentVar lookup="row">aero/alpha-rad</independentVar>
						<independentVar lookup="column">fcs/flap-pos-deg</independentVar>
						<tableData>
										 0.0		 60.0
							-0.01	0.000	 0.000
							 0.00	0.229	 0.611
							 0.44	1.085	 2.895
							 0.57	0.000	 0.000
						</tableData>
					</table>
			</product>
		</function>-->

		<function name="aero/moment/Pitch_alpha">
			<description>Pitch moment due to alpha</description>
			<product>
				<property>aero/qbar-psf</property>
				<property>metrics/Sw-sqft</property>
				<property>metrics/cbarw-ft</property>
				<table>
					<independentVar lookup="row">aero/alpha-deg</independentVar>
					<independentVar lookup="column">aero/beta-deg</independentVar>
					<tableData>
								-30.0		-15.0		0.0		15.0		30.0
						-15.0	0.054833	0.214954	0.329068	0.214954	0.054833
						-10.0	-0.003730	0.115643	0.202617	0.115643	-0.003730
						-5.0	-0.015551	0.030981	0.079436	0.030981	-0.015551
						0.0		-0.078139	-0.067505	-0.041514	-0.067505	-0.078139
						5.0		-0.139188	-0.151589	-0.162204	-0.151589	-0.139188
						10.0	-0.186966	-0.262791	-0.284423	-0.262791	-0.186966
						15.0	-0.088789	-0.368912	-0.428623	-0.368912	-0.088789
						20.0	-0.357689	-0.483537	-0.590700	-0.483537	-0.357689
					</tableData>
				</table>
				<!-- add 5% of the moment for each slat extended -->
				<!--<sum>
					<value>1</value>
					<product>
						<sum>
							<property>fcs/left-slat-pos-norm</property>
							<property>fcs/right-slat-pos-norm</property>
						</sum>
						<value>0.05</value>
					</product>
				</sum>-->
			</product>
		</function>

		<function name="aero/moment/Pitch_elevator">
			<description>Pitch moment due to elevator</description>
			<product>
				<property>aero/qbar-psf</property>
				<property>metrics/Sw-sqft</property>
				<property>metrics/cbarw-ft</property>
				<property>fcs/elevator-pos-rad</property>
				<value>-1.0137362</value>
			</product>
		</function>

		<function name="aero/moment/Pitch_flaps">
			<description>Pitch moment due to flaps</description>
			<product>
				<property>aero/qbar-psf</property>
				<property>metrics/Sw-sqft</property>
				<property>metrics/cbarw-ft</property>
				<sum>
					<table>
						<independentVar lookup="row">aero/alpha-deg</independentVar>
						<independentVar lookup="column">aero/beta-deg</independentVar>
						<independentVar lookup="table">fcs/flap-pos-norm</independentVar>
						<tableData breakPoint="0">
								-30	30
							-15	0	0
							20	0	0
						</tableData>
						<tableData breakPoint="0.5">
									-30.0		-15.0		0.0			15.0		30.0
							-15.0	0.062541	0.052849	0.08732	0.052849	0.062541
							-10.0	-0.017076	0.074012	0.090805	0.074012	-0.017076
							-5.0	-0.111824	0.058503	0.089861	0.058503	-0.111824
							0.0		-0.116790	0.097090	0.077572	0.037920	-0.116790
							5.0		-0.019157	0.122610	0.066839	0.122610	-0.019157
							10.0	-0.089810	0.158037	0.035723	0.158037	-0.089810
							15.0	-0.545194	0.143531	0.020181	0.143531	-0.545194
							20.0	-0.049997	0.062955	-0.076756	0.062955	-0.049997
						</tableData>
						<tableData breakPoint="1">
									-30.0		-15.0		0.0			15.0		30.0
							-15.0	0.018379	0.086169	0.050783	0.086169	0.018379
							-10.0	-0.037128	0.051816	0.056928	0.051816	0.044588
							-5.0	-0.041418	0.078808	0.053426	0.078808	-0.041418
							0.0		0.015441	0.079735	0.051339	0.079735	0.015441
							5.0		0.078545	0.12237	0.037191	0.12237	0.078545
							10.0	0.147568	0.066101	0.009163	0.066101	0.147568
							15.0	-0.188197	-0.025842	-0.034153	-0.025842	-0.188197
							20.0	-0.176882	-0.054245	-0.040107	-0.054245	-0.176882
						</tableData>
					</table>
					<!-- correction value -->
					<table>
						<independentVar lookup="row">aero/alpha-deg</independentVar>
						<independentVar lookup="column">aero/beta-deg</independentVar>
						<independentVar lookup="table">fcs/flap-pos-norm</independentVar>
						<tableData breakPoint="0">
								-30	30
							-15	0	0
							20	0	0
						</tableData>
						<tableData breakPoint="0.5">
									-30.0		-15.0		0.0			15.0		30.0
							-15.0	0.001268	-0.034469	-0.069407	-0.034469	0.001268
							-10.0	0.029927	-0.048198	-0.071677	-0.048198	0.029927
							-5.0	0.110829	-0.038603	-0.073451	-0.038603	0.110829
							0.0		0.133952	-0.047353	-0.069240	-0.047353	0.133952
							5.0		0.079848	-0.038400	-0.060033	-0.038400	0.079848
							10.0	0.038592	-0.194032	-0.046937	-0.194032	0.038592
							15.0	0.277134	-0.266382	-0.003749	-0.266382	0.277134
							20.0	0.183709	-0.268608	0.046054	-0.268608	0.183709
						</tableData>
					</table>
				</sum>
			</product>
		</function>

		<function name="aero/moment/Pitch_damp">
			<description>Pitch moment due to pitch rate</description>
			<product>
				<property>aero/qbar-psf</property>
				<property>metrics/Sw-sqft</property>
				<property>metrics/cbarw-ft</property>
				<property>aero/ci2vel</property>
				<property>velocities/q-aero-rad_sec</property>
				<value>-20.3093991</value>
			</product>
		</function>

		<function name="aero/moment/Pitch_alphadot">
			<description>Pitch moment due to alpha rate</description>
			<product>
				<property>aero/qbar-psf</property>
				<property>metrics/Sw-sqft</property>
				<property>metrics/cbarw-ft</property>
				<property>aero/ci2vel</property>
				<property>aero/alphadot-rad_sec</property>
				<value> -8.4644 </value>
			</product>
		</function>
	</axis>

	<axis name="ROLL">
		<function name="aero/moment/Roll_beta">
			<description>Roll moment due to beta</description>
			<product>
				<property>aero/qbar-psf</property>
				<property>metrics/Sw-sqft</property>
				<property>metrics/bw-ft</property>
				<table>
					<independentVar lookup="row">aero/alpha-deg</independentVar>
					<independentVar lookup="column">aero/beta-deg</independentVar>
					<tableData>
								-30.0		-15.0		0.0		15.0		30.0
						-15.0	-0.039007	-0.023522	0	0.023522	0.039007
						-10.0	-0.043384	-0.025577	0	0.025577	0.043384
						-5.0	-0.046998	-0.025186	0	0.025186	0.046998
						0.0		-0.049935	-0.029072	0	0.029072	0.049935
						5.0		-0.052635	-0.030778	0	0.030778	0.052635
						10.0	-0.056028	-0.032414	0	0.032414	0.056028
						15.0	-0.059621	-0.027869	0	0.027869	0.059621
						20.0	-0.056744	-0.028826	0	0.028826	0.056744
					</tableData>
				</table>
				<value>-1</value>
			</product>
		</function>

		<function name="aero/moment/Roll_damp">
			<description>Roll moment due to roll rate</description>
			<product>
				<property>aero/qbar-psf</property>
				<property>metrics/Sw-sqft</property>
				<property>metrics/bw-ft</property>
				<property>aero/bi2vel</property>
				<property>velocities/p-aero-rad_sec</property>
				<value>-0.5134129</value>
			</product>
		</function>

		<function name="aero/moment/Roll_yaw">
			<description>Roll moment due to yaw rate</description>
			<product>
				<property>aero/qbar-psf</property>
				<property>metrics/Sw-sqft</property>
				<property>metrics/bw-ft</property>
				<property>aero/bi2vel</property>
				<property>velocities/r-aero-rad_sec</property>
				<value>0.1496102</value>
			</product>
		</function>

		<function name="aero/moment/Roll_aileron">
			<description>Roll moment due to aileron</description>
			<product>
				<property>aero/qbar-psf</property>
				<property>metrics/Sw-sqft</property>
				<property>metrics/bw-ft</property>
				<property>fcs/aileron-pos-rad</property>
				<value>0.1496594</value>
			</product>
		</function>

		<!--<function name="aero/moment/Roll_left_flap">
			 <description>Roll moment due to left flap</description>
			 <product>
				<property>metrics/bw-ft</property>
			 	<property>aero/force/Lift_left_flap</property>
			 	<property>metrics/left-flap-arm-y-ft</property>
			 </product>
		</function>

		<function name="aero/moment/Roll_right_flap">
			 <description>Roll moment due to right flap</description>
			 <product>
				<property>metrics/bw-ft</property>
			 	<property>aero/force/Lift_right_flap</property>
			 	<property>metrics/right-flap-arm-y-ft</property>
			 </product>
		</function>

		<function name="aero/moment/Roll_left_slat">
			 <description>Roll moment due to left slat</description>
			 <product>
				<property>metrics/bw-ft</property>
			 	<property>aero/force/Lift_left_slat</property>
			 	<property>metrics/left-slat-arm-y-ft</property>
			 </product>
		</function>

		<function name="aero/moment/Roll_right_slat">
			 <description>Roll moment due to right slat</description>
			 <product>
				<property>metrics/bw-ft</property>
			 	<property>aero/force/Lift_right_slat</property>
			 	<property>metrics/right-slat-arm-y-ft</property>
			 </product>
		</function>-->

		<function name="aero/moment/Roll_rudder">
			<description>Roll moment due to rudder</description>
			<product>
				<property>aero/qbar-psf</property>
				<property>metrics/Sw-sqft</property>
				<property>metrics/bw-ft</property>
				<property>fcs/rudder-pos-rad</property>
				<value>0.0214626</value>
			</product>
		</function>
	</axis>

	<axis name="YAW">
		<function name="aero/moment/Yaw_beta">
			<description>Yaw moment due to beta</description>
			<product>
				<property>aero/qbar-psf</property>
				<property>metrics/Sw-sqft</property>
				<property>metrics/bw-ft</property>
				<table>
					<independentVar lookup="row">aero/alpha-deg</independentVar>
					<independentVar lookup="column">aero/beta-deg</independentVar>
					<tableData>
								-30.0		-15.0		0.0		15.0		30.0
						-15.0	0.026987	0.016915	0	-0.016915	-0.026987
						-10.0	0.027544	0.013832	0	-0.013832	-0.027544
						-5.0	0.023285	0.010086	0	-0.010086	-0.023285
						0.0		0.019607	0.009747	0	-0.009747	-0.019607
						5.0		0.016647	0.008510	0	-0.008510	-0.016647
						10.0	0.013462	0.006866	0	-0.006866	-0.013462
						15.0	0.015393	0.008000	0	-0.008000	-0.015393
						20.0	0.017490	0.013278	0	-0.013278	-0.017490
					</tableData>
				</table>
				<value>-1</value>
			</product>
		</function>

		<function name="aero/moment/Yaw_roll_rate">
			<description>Yaw moment due to roll rate</description>
			<product>
				<property>aero/qbar-psf</property>
				<property>metrics/Sw-sqft</property>
				<property>metrics/bw-ft</property>
				<property>aero/bi2vel</property>
				<property>velocities/p-rad_sec</property>
				<value>-0.0240228</value>
			</product>
		</function>

		<function name="aero/moment/Yaw_damp">
			<description>Yaw moment due to yaw rate</description>
			<product>
				<property>aero/qbar-psf</property>
				<property>metrics/Sw-sqft</property>
				<property>metrics/bw-ft</property>
				<property>aero/bi2vel</property>
				<property>velocities/r-aero-rad_sec</property>
				<value>-0.0963779</value>
				<value>2.5</value> <!-- tuning factor -->
			</product>
		</function>

		<function name="aero/moment/Yaw_rudder">
			<description>Yaw moment due to rudder</description>
			<product>
				<property>aero/qbar-psf</property>
				<property>metrics/Sw-sqft</property>
				<property>metrics/bw-ft</property>
				<property>fcs/rudder-pos-rad</property>
				<value>-0.0813419 </value>
			</product>
		</function>

		<!--<function name="aero/moment/Yaw_left_flap">
			 <description>Yaw moment due to left flap</description>
			 <product>
				<property>metrics/bw-ft</property>
			 	<property>aero/force/Drag_left_flap</property>
			 	<property>metrics/left-flap-arm-y-ft</property>
			 </product>
		</function>

		<function name="aero/moment/Yaw_right_flap">
			 <description>Yaw moment due to right flap</description>
			 <product>
				<property>metrics/bw-ft</property>
			 	<property>aero/force/Drag_right_flap</property>
			 	<property>metrics/right-flap-arm-y-ft</property>
			 </product>
		</function>

		<function name="aero/moment/Yaw_left_slat">
			 <description>Yaw moment due to left slat</description>
			 <product>
				<property>metrics/bw-ft</property>
			 	<property>aero/force/Drag_left_slat</property>
			 	<property>metrics/left-slat-arm-y-ft</property>
			 </product>
		</function>

		<function name="aero/moment/Yaw_right_slat">
			 <description>Yaw moment due to right slat</description>
			 <product>
				<property>metrics/bw-ft</property>
			 	<property>aero/force/Drag_right_slat</property>
			 	<property>metrics/right-slat-arm-y-ft</property>
			 </product>
		</function>-->

		<function name="aero/moment/Yaw_aileron">
			<description>Adverse yaw</description>
			<product>
				<property>aero/qbar-psf</property>
				<property>metrics/Sw-sqft</property>
				<property>metrics/bw-ft</property>
				<property>fcs/aileron-pos-rad</property>
				<value>-0.0052027</value>
			</product>
		</function>
	</axis>
</aerodynamics>
